// COMSOL Multiphysics 4.4.0.150 model "Eigenfrequency Analysis of a Free Cylinder 3D.mph"
// Outline of the model tree

Geometry
  geom1 "Geometry 1" (2D axisymmetric, length unit µm)
    r1: Rectangle | pos = {1.8, 0}; size = {.4, 10}
    fin: Finalize "Form Union"

Physics
  solid: SolidMechanics on all domains
    dependent variable u = {u, v, w}
    lemm1: LinearElasticModel "Linear Elastic Material 1" (default)
      E_mat = userdef
      E = 2e11[Pa]
      nu_mat = userdef
      nu = .3
      rho_mat = userdef
      rho = 8000[kg/m^3]
    axi1: AxialSymmetrySolid "Axial Symmetry 1" (default)
    free1: Free (default)
    init1: init "Initial Values 1" (default)

Mesh
  mesh1 "Mesh 1" (physics-controlled)
    size: MeshSizeDefault | hauto = 5

Studies
  std1 "Study 1"
    eig: Eigenfrequency | neigs = 6; shift = 100

Solver configurations
  sol1 "Solver 1" (study std1)
    v1: Variables "Dependent Variables 1"
    e1: Eigenvalue "Eigenvalue Solver 1" | neigs = 6; transform = eigenfrequency; shift = 100
      dDef: Direct

Datasets
  dset1: Solution | solution = sol1
  rev1: Revolve2D "Revolution 2D 1" | data = dset1; genpoints = {{0, 0}, {0, 1}}; startangle = -90; revangle = 225

Plots
  pg1: PlotGroup2D "Mode Shape (solid)" | data = dset1
    surf1: Surface | expr = solid.disp
      def: Deform "Deformation" | expr = {u, w}
  pg2: PlotGroup3D "Mode Shape, 3D (solid)" | data = rev1
    surf1: Surface | expr = solid.disp
      def: Deform "Deformation" | expr = {cos(rev1phi)*u, sin(rev1phi)*u, w}; descr = Displacement field (Material)