// COMSOL Multiphysics 4.4.0.150 model "Mydul.mph"
// Outline of the model tree

Geometry
  geom1 "Geometry 1" (2D, length unit µm)
    r1: Rectangle | size = {1, 0.4}
    r2: Rectangle (disabled) | pos = {0, .3}; size = {0.3, .1}
    r5: Rectangle | pos = {0, 0.3}; type = solid; base = corner; size = {0.3, 0.1}
    r6: Rectangle | pos = {.7, 0.3}; type = solid; base = corner; size = {0.3, 0.1}
    pt1: Point | p = {.35, .4}
    pt2: Point | p = {.65, .4}
    r3: Rectangle (disabled) | pos = {.7, .3}; size = {.3, .1}
    fin: Finalize "Form Union"

Materials
  mat1 "Copper" on domains 1
    def "Basic"
      relpermeability = 1
      electricconductivity = 5.998e7[S/m]
      thermalexpansioncoefficient = 17e-6[1/K]
      heatcapacity = 385[J/(kg*K)]
      relpermittivity = 1
      density = 8700[kg/m^3]
      thermalconductivity = 400[W/(m*K)]
    Enu "Young's modulus and Poisson's ratio"
      youngsmodulus = 110e9[Pa]
      poissonsratio = 0.35
    linzRes "Linearized resistivity"
      rho0 = 1.72e-8[ohm*m]
      alpha = 0.0039[1/K]
      Tref = 298[K]
  mat2 "Zinc [solid,a-axis]" on domains 2
    def "Basic"
      dL = (dL_solid_a_axis_2(T[1/K])-dL_solid_a_axis_2(Tempref[1/K]))/(1+dL_solid_a_axis_2(Tempref[1/K]))
      thermalconductivity = k_solid_1(T[1/K])[W/(m*K)]
      resistivity = res_solid_1(T[1/K])[ohm*m]
      thermalexpansioncoefficient = (alpha_solid_a_axis_2(T[1/K])[1/K]+(Tempref-293[K])*if(abs(T-Tempref)>1e-3,(alpha_solid_a_axis_2(T[1/K])[1/K]-alpha_solid_a_axis_2(Tempref[1/K])[1/K])/(T-Tempref),d(alpha_solid_a_axis_2(T[1/K]),T)[1/K]))/(1+alpha_solid_a_axis_2(Tempref[1/K])[1/K]*(Tempref-293[K]))
      heatcapacity = C_solid_1(T[1/K])[J/(kg*K)]
      HC = HC_solid_1(T[1/K])[J/(mol*K)]
      mu = mu(T[1/K])[Pa]
      electricconductivity = sigma_solid_1(T[1/K])[S/m]
      density = rho_solid_1(T[1/K])[kg/m^3]
      VP = VP_solid_1(T[1/K])[Pa]
      kappa = kappa(T[1/K])[Pa]
      dL_solid_a_axis_2: Piecewise | arg = T; extrap = constant; pieces = {293.0, 682.0, -0.004021221+1.635656E-5*T^1-1.622913E-8*T^2+2.472804E-11*T^3}
      k_solid_1: Piecewise
        arg = T
        extrap = constant
        pieces = 
          {0.0, 9.0, 1750.994*T^1+138.9875*T^2-27.18274*T^3-2.655161*T^4+0.2706808*T^5}
          {9.0, 30.0, 36446.01-6855.608*T^1+557.1501*T^2-23.48013*T^3+0.5035428*T^4-0.004348847*T^5}
          {30.0, 100.0, 2658.764-156.6486*T^1+4.11112*T^2-0.0555499*T^3+3.785208E-4*T^4-1.029048E-6*T^5}
          {100.0, 693.0, 116.8392+0.012743*T^1-5.778175E-5*T^2}
      res_solid_1: Piecewise "Piecewise 1a"
        arg = T
        extrap = constant
        pieces = 
          {1.0, 4.0, 5.59E-13+4.1E-14*T^1}
          {4.0, 15.0, -1.765979E-11+9.650934E-12*T^1-1.67502E-12*T^2+1.011465E-13*T^3}
          {15.0, 60.0, 5.276678E-10-9.95103E-11*T^1+5.118391E-12*T^2-2.928466E-14*T^3}
          {60.0, 693.0, -5.945099E-9+2.05821E-10*T^1+6.369715E-14*T^2-5.642177E-18*T^3}
      alpha_solid_a_axis_2: Piecewise "Piecewise 2a" | arg = T; extrap = constant; pieces = {293.0, 682.0, 1.713714E-5-2.962112E-8*T^1+6.52683E-11*T^2-2.594113E-14*T^3}
      C_solid_1: Piecewise "Piecewise 1b"
        arg = T
        extrap = constant
        pieces = 
          {100.0, 320.0, 106.622+2.82781*T^1-0.01099511*T^2+1.945167E-5*T^3-1.258998E-8*T^4}
          {320.0, 693.0, 329.7327+0.3410779*T^1-7.026091E-4*T^2+7.366442E-7*T^3}
      HC_solid_1: Piecewise "Piecewise 1c"
        arg = T
        extrap = constant
        pieces = 
          {100.0, 300.0, 6.970946+0.1848823*T^1-7.188602E-4*T^2+1.27175E-6*T^3-8.23133E-10*T^4}
          {300.0, 693.0, 21.55793+0.02229967*T^1-4.59366E-5*T^2+4.816181E-8*T^3}
      mu: Piecewise | arg = T; extrap = constant; pieces = {0.0, 650.0, 4.649125E10-1.600167E7*T^1-15433.1*T^2}
      sigma_solid_1: Piecewise "Piecewise 1d"
        arg = T
        extrap = constant
        pieces = 
          {1.0, 4.0, 1/(4.100000E-14*T+5.590000E-13)}
          {4.0, 15.0, 1/(1.011465E-13*T^3-1.675020E-12*T^2+9.650934E-12*T-1.765979E-11)}
          {15.0, 60.0, 1/(-2.928466E-14*T^3+5.118391E-12*T^2-9.951030E-11*T+5.276678E-10)}
          {60.0, 693.0, 1/(-5.642177E-18*T^3+6.369715E-14*T^2+2.058210E-10*T-5.945099E-09)}
      rho_solid_1: Piecewise "Piecewise 1e"
        arg = T
        extrap = constant
        pieces = 
          {0.0, 300.0, 7280.967+0.01347873*T^1-0.0044426*T^2+1.518314E-5*T^3-1.986628E-8*T^4}
          {300.0, 890.0, 7302.0-0.5059331*T^1-1.783429E-4*T^2}
      VP_solid_1: Piecewise "Piecewise 1f" | arg = T; extrap = constant; pieces = {293.0, 693.0, (exp((-6.776000e+003/T+8.982810e+000)*log(10.0)))*1.333200e+002}
      kappa: Piecewise | arg = T; extrap = constant; pieces = {0.0, 650.0, 7.311465E10-9878210.0*T^1-23696.37*T^2+14.42497*T^3}
    Enu "Young's modulus and Poisson's ratio"
      youngsmodulus = E(T[1/K])[Pa]
      poissonsratio = nu(T[1/K])
      E: Piecewise | arg = T; extrap = constant; pieces = {0.0, 650.0, 1.150919E11-3.571227E7*T^1-36832.04*T^2}
      nu: Piecewise | arg = T; extrap = constant; pieces = {0.0, 650.0, 0.2387441+2.575808E-5*T^1+7.942822E-8*T^2}
  mat3 "Ge" on domains 3
    def "Basic"
      heatcapacity = 310[J/(kg*K)]
      relpermittivity = 16.2
      thermalconductivity = 60[W/(m*K)]
      density = 5323[kg/m^3]
    SemicondMaterial "Semiconductor material"
      Eg0 = 0.664[V]
      chi0 = 4[V]
      Nv = (T/300[K])^(3/2)*6.0e18[1/cm^3]
      Nc = (T/300[K])^(3/2)*1.04e19[1/cm^3]
      mun = 3900[cm^2/(V*s)]
      mup = 1900[cm^2/(V*s)]

Physics
  ht: HeatTransfer "Heat Transfer in Solids" on all domains
    dependent variable T
    solid1: SolidHeatTransferModel "Heat Transfer in Solids 1" (default)
    ins1: ThermalInsulation (default)
    init1: init "Initial Values 1" (default)
    bhs1: BoundaryHeatSource on boundaries 8 | Qb = 1[W/um^2]
    temp1: TemperatureBoundary "Temperature 1" on boundaries 2 | T0 = 298[K]

Mesh
  mesh1 "Mesh 1" (physics-controlled)
    size: MeshSizeDefault | hauto = 4

Studies
  std1 "Study 1"
    stat: Stationary

Solver configurations
  sol1 "Solver 1" (study std1)
    v1: Variables "Dependent Variables 1"
    s1: Stationary "Stationary Solver 1"
      fc1: FullyCoupled | linsolver = d1; dtech = auto; initstep = 0.01; minstep = 1.0E-6; maxiter = 50
      d1: Direct | linsolver = pardiso

Datasets
  dset1: Solution | solution = sol1

Plots
  pg1: PlotGroup2D "Temperature (ht)" | data = dset1
    surf1: Surface | expr = T
  pg2: PlotGroup2D "Isothermal Contours (ht)" | data = dset1
    con1: Contour | expr = T
    arws1: ArrowSurface | expr = {ht.tfluxx, ht.tfluxy}